// SBML level 3 version 1

model main()

  // Parameters:
  u1 = 0;
  u4 = 0;
  kdelay = 0.625;
  d1 = 1;
  d2 = 1;
  d3 = 1;
  d4 = 1;
  p1 = 0.00174155;
  p2 = 8;
  p3 = 0.868;
  p4 = 0.108;
  p5 = 584;
  p6 = 1503;
  p7 = 0.000289;
  p8 = 0.000214;
  p9 = 0.000128;
  p10 = -8.83e-6;
  p11 = 0.88;
  p12 = 0.0189;
  p13 = 0.00998996;
  p14 = 2.85;
  p15 = 0.000663;
  p16 = 95;
  p17 = 0.00074619;
  p18 = 0.075;
  p19 = 0.00033572;
  p20 = 5.37;
  p21 = 0.0689;
  p22 = 127;
  p23 = 2043;
  p24 = 0.00395;
  p25 = 0.00185;
  p26 = 0.00061;
  p27 = -0.000505;
  p28 = 0.88;
  p29 = 0.207;
  p30 = 1166;
  p31 = 581;
  p32 = 2.37;
  p33 = -3.71;
  p34 = 0.53;
  p35 = 0.037;
  p36 = 23;
  p37 = 0.118;
  p38 = 0.29;
  p39 = 0.006;
  p40 = 0.037;
  p41 = 0.0034;
  p42 = 5;
  p43 = 1.3;
  p44 = 0.12;
  p45 = 1.78;
  p46 = 0.12;
  p47 = 3.2;
  p48 = 5.2;
  q_1 = 0.3221142;
  q_2 = 0.201297;
  q_3 = 0.6389674;
  q_4 = 0.00663104;
  q_5 = 0.01125958;
  q_6 = 0.06529606;
  q_7 = 1.788296;
  q_8 = 7.057276;
  q_9 = 7.057145;
  q_10 = 0;
  q_11 = 0;
  q_12 = 0;
  q_13 = 0;
  q_14 = 3.342897;
  q_15 = 3.692772;
  q_16 = 3.879421;
  q_17 = 3.900619;
  q_18 = 3.778757;
  q_19 = 3.553645;

  // Assignment rules:
  q4F := (p24 + p25*q_1 + p26*q_1^2 + p27*q_1^3)*q_4;
  q1F := (p7 + p8*q_1 + p9*q_1^2 + p10*q_1^3)*q_1;
  SR3 := p19*q_19*d3;
  SR4 := p1*q_19*d1;
  fCIRC := 1 + (p32/(p31*exp(-q_9)) - 1)*(1/(1 + exp(10*q_9 - 55)));
  SRTSH := (p30 + p31*fCIRC*sin(pi/12*time - p33))*exp(-q_9);
  fdegTSH := p34 + p35/(p36 + q_7);
  fLAG := p41 + 2*q_8^11/(p42^11 + q_8^11);
  f4 := p37 + 5*p37/(1 + exp(2*q_8 - 7));

  // Rate rules:
  q_1' = SR4 + p3*q_2 + p4*q_3 - (p5 + p6)*q1F + p11*q_11 + u1;
  q_2' = p6*q1F - (p3 + p12 + p13/(p14 + q_2))*q_2;
  q_3' = p5*q1F - (p4 + p15/(p16 + q_3) + p17/(p18 + q_3))*q_3;
  q_4' = SR3 + p20*q_5 + p21*q_6 - (p22 + p23)*q4F + p28*q_13 + u4;
  q_5' = p23*q4F + p13*q_2/(p14 + q_2) - (p20 + p29)*q_5;
  q_6' = p22*q4F + p15*q_3/(p16 + q_3) + p17*q_3/(p18 + q_3) - p21*q_6;
  q_7' = SRTSH - fdegTSH*q_7;
  q_8' = f4/p38*q_1 + p37/p39*q_4 - p40*q_8;
  q_9' = fLAG*(q_8 - q_9);
  q_10' = -p43*q_10;
  q_11' = p43*q_10 - (p44 + p11)*q_11;
  q_12' = -p45*q_12;
  q_13' = p45*q_12 - (p46 + p28)*q_13;
  q_14' = -kdelay*q_14 + q_7;
  q_15' = kdelay*(q_14 - q_15);
  q_16' = kdelay*(q_15 - q_16);
  q_17' = kdelay*(q_16 - q_17);
  q_18' = kdelay*(q_17 - q_18);
  q_19' = kdelay*(q_18 - q_19);
end
